test_v := 4
test_e := 5
avg_w_V(T) :=
    t_i ← 0
    k ← 0
    while t_i < rows(T)
        res[k, 0] ← T[t_i, 0]
        s ← 0
        denom ← 0
        for i ∈ 0 .. test_v
            s ← s + T[t_i, 2]*T[t_i, 1]
            denom ← denom + T[t_i, 1]
            t_i ← t_i + 1
        res[k, 1] ← s/denom
        k ← k + 1
    return res
avg_s_V(T) :=
    t_i ← 0
    k ← 0
    while t_i < rows(T)
        res[k, 0] ← T[t_i, 0]
        s ← 0
        denom ← 0
        for i ∈ 0 .. test_v
            s ← s + T[t_i, 2]
            denom ← denom + 1
            t_i ← t_i + 1
        res[k, 1] ← s/denom
        k ← k + 1
    return res
avg_w_E(T) :=
    k ← 0
    while k < test_e
        t_i ← k
        res[k, 0] ← T[k, 1]
        s ← 0
        denom ← 0
        while t_i < rows(T)
            s ← s + T[t_i, 2]*T[t_i, 1]
            denom ← denom + T[t_i, 1]
            t_i ← t_i + test_v
        res[k, 1] ← s/denom
        k ← k + 1
    return res
avg_s_E(T) :=
    k ← 0
    while k < test_e
        t_i ← k
        res[k, 0] ← T[k, 1]
        s ← 0
        denom ← 0
        while t_i < rows(T)
            s ← s + T[t_i, 2]
            denom ← denom + 1
            t_i ← t_i + test_v
        res[k, 1] ← s/denom
        k ← k + 1
    return res
avg_V(T) := avg_s_V(T)
avg_E(T) := avg_s_E(T)
SDGPP := [
    1000, 250000, 0.0358413;
    1000, 400000, 0.0612824;
    1000, 500000, 0.046853;
    1000, 700000, 0.0445399;
    1000, 800000, 0.048031;
    2000, 250000, 0.0791495;
    2000, 400000, 0.0956269;
    2000, 500000, 0.105971;
    2000, 700000, 0.137226;
    2000, 800000, 0.166242;
    4000, 250000, 0.16247;
    4000, 400000, 0.197236;
    4000, 500000, 0.231163;
    4000, 700000, 0.274463;
    4000, 800000, 0.30148;
    5000, 250000, 0.234493;
    5000, 400000, 0.283873;
    5000, 500000, 0.309775;
    5000, 700000, 0.37339;
    5000, 800000, 0.38851
]
SVKB := [
    1000, 250000, 0.00187255;
    1000, 400000, 0.00247961;
    1000, 500000, 0.0028538;
    1000, 700000, 0.00290676;
    1000, 800000, 0.00286146;
    2000, 250000, 0.00420063;
    2000, 400000, 0.00504216;
    2000, 500000, 0.00522432;
    2000, 700000, 0.00704423;
    2000, 800000, 0.0182454;
    4000, 250000, 0.0140617;
    4000, 400000, 0.0140007;
    4000, 500000, 0.0142553;
    4000, 700000, 0.0151976;
    4000, 800000, 0.0156107;
    5000, 250000, 0.0235131;
    5000, 400000, 0.020621;
    5000, 500000, 0.021184;
    5000, 700000, 0.0216511;
    5000, 800000, 0.0222903
]
BDGPP := [
    1000, 250000, 0.139411;
    1000, 400000, 0.210336;
    1000, 500000, 0.0967249;
    1000, 700000, 0.0770624;
    1000, 800000, 0.0770831;
    2000, 250000, 1.24036;
    2000, 400000, 0.675885;
    2000, 500000, 0.448295;
    2000, 700000, 0.569354;
    2000, 800000, 0.632271;
    4000, 250000, 8.8456;
    4000, 400000, 10.8733;
    4000, 500000, 10.7074;
    4000, 700000, 9.78116;
    4000, 800000, 10.086;
    5000, 250000, 11.8206;
    5000, 400000, 15.3053;
    5000, 500000, 18.0868;
    5000, 700000, 18.9456;
    5000, 800000, 17.9127
]
SVSSS := [
    1000, 250000, 0.00316962;
    1000, 400000, 0.00404081;
    1000, 500000, 0.0045391;
    1000, 700000, 0.00454005;
    1000, 800000, 0.00454643;
    2000, 250000, 0.00823347;
    2000, 400000, 0.00914774;
    2000, 500000, 0.00937455;
    2000, 700000, 0.0104129;
    2000, 800000, 0.0112203;
    4000, 250000, 0.027611;
    4000, 400000, 0.0286943;
    4000, 500000, 0.029295;
    4000, 700000, 0.0312933;
    4000, 800000, 0.0318515;
    5000, 250000, 0.0452299;
    5000, 400000, 0.0433627;
    5000, 500000, 0.0439848;
    5000, 700000, 0.0456966;
    5000, 800000, 0.0459754
]
BVKB := [
    1000, 250000, 0.0017845;
    1000, 400000, 0.00236349;
    1000, 500000, 0.00278426;
    1000, 700000, 0.00280404;
    1000, 800000, 0.00281169;
    2000, 250000, 0.00273896;
    2000, 400000, 0.00346725;
    2000, 500000, 0.00413715;
    2000, 700000, 0.00492094;
    2000, 800000, 0.00521411;
    4000, 250000, 0.00538892;
    4000, 400000, 0.00606585;
    4000, 500000, 0.00650256;
    4000, 700000, 0.0073106;
    4000, 800000, 0.00771063;
    5000, 250000, 0.0068372;
    5000, 400000, 0.00740789;
    5000, 500000, 0.00811321;
    5000, 700000, 0.00928427;
    5000, 800000, 0.00958254
]
BVSSS := [
    1000, 250000, 0.00562754;
    1000, 400000, 0.00794031;
    1000, 500000, 0.00987698;
    1000, 700000, 0.0100087;
    1000, 800000, 0.00995545;
    2000, 250000, 0.0086536;
    2000, 400000, 0.0111342;
    2000, 500000, 0.0125812;
    2000, 700000, 0.0152828;
    2000, 800000, 0.0166692;
    4000, 250000, 0.0167193;
    4000, 400000, 0.0190269;
    4000, 500000, 0.0206124;
    4000, 700000, 0.0236292;
    4000, 800000, 0.0249342;
    5000, 250000, 0.0214903;
    5000, 400000, 0.0240248;
    5000, 500000, 0.0256373;
    5000, 700000, 0.030172;
    5000, 800000, 0.0313462
]
SDGPP_V := avg_V(SDGPP)
SVKB_V := avg_V(SVKB)
BDGPP_V := avg_V(BDGPP)
BVKB_V := avg_V(BVKB)
SDGPP_E := avg_E(SDGPP)
SVSSS_V := avg_V(SVSSS)
SVKB_E := avg_E(SVKB)
BDGPP_E := avg_E(BDGPP)
BVSSS_V := avg_V(BVSSS)
BVKB_E := avg_E(BVKB)
SVSSS_E := avg_E(SVSSS)
BVSSS_E := avg_E(BVSSS)
SDGPP_V = [1000, 0.0473095; 2000, 0.116843; 4000, 0.233362; 5000, 0.318008]
SVKB_V = [1000, 0.00259484; 2000, 0.00795135; 4000, 0.0146252; 5000, 0.0218519]
BDGPP_V = [1000, 0.120123; 2000, 0.713233; 4000, 10.0587; 5000, 16.4142]
BVKB_V = [1000, 0.0025096; 2000, 0.00409568; 4000, 0.00659571; 5000, 0.00824502]
SVSSS_V = [1000, 0.0041672; 2000, 0.00967779; 4000, 0.029749; 5000, 0.0448499]
BVSSS_V = [1000, 0.0086818; 2000, 0.0128642; 4000, 0.0209844; 5000, 0.0265341]
SDGPP_E = [250000, 0.147227; 400000, 0.178182; 500000, 0.195964; 700000, 0.19415; 800000, 0.175073]
SVKB_E = [250000, 0.00933091; 400000, 0.0122614; 500000, 0.0118439; 700000, 0.013587; 800000, 0.0111955]
BDGPP_E = [250000, 5.35971; 400000, 5.99019; 500000, 7.72996; 700000, 8.22639; 800000, 6.66478]
BVKB_E = [250000, 0.00468552; 400000, 0.00514807; 500000, 0.00572707; 700000, 0.00588536; 800000, 0.00541077]
SVSSS_E = [250000, 0.0181573; 400000, 0.0197545; 500000, 0.0237692; 700000, 0.0267628; 800000, 0.0219043]
BVSSS_E = [250000, 0.0151006; 400000, 0.0165059; 500000, 0.0185673; 700000, 0.0188907; 800000, 0.0174689]
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# [component: inputs (SDGPP[:, 0], SDGPP[:, 1], SDGPP[:, 2])]
# [component: inputs (BDGPP[:, 0], BDGPP[:, 1], BDGPP[:, 2])]
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# [component: inputs (SVKB[:, 0], SVKB[:, 1], SVKB[:, 2])]
# [component: inputs (BVKB[:, 0], BVKB[:, 1], BVKB[:, 2])]
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# [component: inputs (BVSSS[:, 0], BVSSS[:, 1], BVSSS[:, 2])]
# [component: inputs (SVSSS[:, 0], SVSSS[:, 1], SVSSS[:, 2])]
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